*Node
1,1.000000,0.059018
2,1.000000,-0.000000
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*User element, nodes=4,type=U4, properties=3,coordinates=2, variables=8
1,2
*Element, type=U4
2,255,252,253,257
30,188,187,205,206
66,33,22,18,34
81,17,8,15,16
119,7,2,1,6
*User element, nodes=5,type=U5, properties=3,coordinates=2, variables=8
1,2
*Element, type=U5
6,189,171,167,168,190
8,234,233,232,243,244
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*User element, nodes=6,type=U6, properties=3,coordinates=2, variables=8
1,2
*Element, type=U6
1,185,182,181,184,201,202
3,68,50,49,48,66,67
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*User element, nodes=7,type=U7, properties=3,coordinates=2, variables=8
1,2
*Element, type=U7
32,74,59,55,54,56,57,73
53,200,197,199,198,213,215,216
70,30,16,15,13,14,28,29
80,44,27,26,25,41,43,45
84,191,172,169,170,171,189,192
97,247,240,239,237,238,245,248
114,204,202,201,203,217,219,220
*Elset, elset=E1,generate
1,128,1
*Uel property, elset=E1
10000., 0.3,1.0,0.0,0.0
*Nset, nset=Node, generate
1,258,1
*Nset, nset=N3
166,188,206,221,234,244,251,256,258,
*Amplitude, name=Amp-1, definition=PERIODIC
1,             10.,              0.,              0.
             0.,              1.
**
** MATERIALS
*Boundary
N3, 1, 1
N3, 2, 2
*Step, name=Step-1, nlgeom=NO, inc=1000
*Dynamic,direct
0.01,1.,
**
** LOADS
**
** Name: Load-1   Type: Concentrated force
*Cload, amplitude=Amp-1
1, 2, 1000.
**
** OUTPUT REQUESTS
**
*Restart, write, frequency=0
**
** FIELD OUTPUT: F-Output-1
**
*Output, field, variable=PRESELECT
**
** HISTORY OUTPUT: H-Output-1
**
*Output, history, variable=PRESELECT
*End Step
