*Node
      1,           0.,           0.
      2,          0.5,           0.
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*User element, nodes=4,type=U4, properties=3,coordinates=2, variables=800
1,2
*Element, type=U4
 1,  1,  2,  5,  4
 2,  2,  3,  6,  5
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*Nset, nset=N1, generate
  1,  63,   1
*Elset, elset=E1, generate
  1,  40,   1
*Nset, nset=bottom, generate
 1,  3,  1
*Nset, nset=all, generate
  1,  63,   1
*Uel property, elset=E1
1000000.,0.3,2000.0,0.0,0.0
** Section: Section-1
**
**
** ASSEMBLY
**
**
*Nset, nset=_PickedSet9, generate
 1,  3,  1
**
** MATERIALS
**
**
** BOUNDARY CONDITIONS
**
** Name: BC-3 Type: Displacement/Rotation
*Boundary
_PickedSet9, 1, 1
_PickedSet9, 2, 2
** ----------------------------------------------------------------
**
** STEP: Step-1
**
*Step, name=Step-1, nlgeom=NO, perturbation
*Frequency, eigensolver=Lanczos
5, , , , ,
**
** BOUNDARY CONDITIONS
**
** Name: BC-2 Type: Displacement/Rotation
*Boundary
all, 2, 2
**
** OUTPUT REQUESTS
**
*Restart, write, frequency=0
**
** FIELD OUTPUT: F-Output-1
**
*Output, field, variable=PRESELECT
*End Step
